! chosen manually using master
! ID here then replace in xxxx
!15695193
!!11546711
!13379019
!14554105
!12812602
!12753273
!13580150
!15688800
!13605448
!!131735859
!15468770
!13781202
!13687015
!15299670
!15210260 ! added
!15596111 ! added
!17383288 ! added

new load.statcom_15695193_1 bus1=15695193.1 kv=0.2396003617136947 phases=1 kW=0 pf=1
new load.statcom_15695193_2 bus1=15695193.2 kv=0.2396003617136947 phases=1 kW=0 pf=1
new load.statcom_15695193_3 bus1=15695193.3 kv=0.2396003617136947 phases=1 kW=0 pf=1

!new load.statcom_11546711_1 bus1=11546711.1 kv=0.2396003617136947 phases=1 kW=0 pf=1
!new load.statcom_11546711_2 bus1=11546711.2 kv=0.2396003617136947 phases=1 kW=0 pf=1
!new load.statcom_11546711_3 bus1=11546711.3 kv=0.2396003617136947 phases=1 kW=0 pf=1

new load.statcom_13379019_1 bus1=13379019.1 kv=0.2396003617136947 phases=1 kW=0 pf=1
new load.statcom_13379019_2 bus1=13379019.2 kv=0.2396003617136947 phases=1 kW=0 pf=1
new load.statcom_13379019_3 bus1=13379019.3 kv=0.2396003617136947 phases=1 kW=0 pf=1

new load.statcom_14554105_1 bus1=14554105.1 kv=0.2396003617136947 phases=1 kW=0 pf=1
new load.statcom_14554105_2 bus1=14554105.2 kv=0.2396003617136947 phases=1 kW=0 pf=1
new load.statcom_14554105_3 bus1=14554105.3 kv=0.2396003617136947 phases=1 kW=0 pf=1

new load.statcom_12812602_1 bus1=12812602.1 kv=0.2396003617136947 phases=1 kW=0 pf=1
new load.statcom_12812602_2 bus1=12812602.2 kv=0.2396003617136947 phases=1 kW=0 pf=1
new load.statcom_12812602_3 bus1=12812602.3 kv=0.2396003617136947 phases=1 kW=0 pf=1

new load.statcom_12753273_1 bus1=12753273.1 kv=0.2396003617136947 phases=1 kW=0 pf=1
new load.statcom_12753273_2 bus1=12753273.2 kv=0.2396003617136947 phases=1 kW=0 pf=1
new load.statcom_12753273_3 bus1=12753273.3 kv=0.2396003617136947 phases=1 kW=0 pf=1

new load.statcom_13580150_1 bus1=13580150.1 kv=0.2396003617136947 phases=1 kW=0 pf=1
new load.statcom_13580150_2 bus1=13580150.2 kv=0.2396003617136947 phases=1 kW=0 pf=1
new load.statcom_13580150_3 bus1=13580150.3 kv=0.2396003617136947 phases=1 kW=0 pf=1

new load.statcom_15688800_1 bus1=15688800.1 kv=0.2396003617136947 phases=1 kW=0 pf=1
new load.statcom_15688800_2 bus1=15688800.2 kv=0.2396003617136947 phases=1 kW=0 pf=1
new load.statcom_15688800_3 bus1=15688800.3 kv=0.2396003617136947 phases=1 kW=0 pf=1

new load.statcom_13605448_1 bus1=13605448.1 kv=0.2396003617136947 phases=1 kW=0 pf=1
new load.statcom_13605448_2 bus1=13605448.2 kv=0.2396003617136947 phases=1 kW=0 pf=1
new load.statcom_13605448_3 bus1=13605448.3 kv=0.2396003617136947 phases=1 kW=0 pf=1

!new load.statcom_131735859_1 bus1=131735859.1 kv=0.2396003617136947 phases=1 kW=0 pf=1
!new load.statcom_131735859_2 bus1=131735859.2 kv=0.2396003617136947 phases=1 kW=0 pf=1
!new load.statcom_131735859_3 bus1=131735859.3 kv=0.2396003617136947 phases=1 kW=0 pf=1

new load.statcom_15468770_1 bus1=15468770.1 kv=0.2396003617136947 phases=1 kW=0 pf=1
new load.statcom_15468770_2 bus1=15468770.2 kv=0.2396003617136947 phases=1 kW=0 pf=1
new load.statcom_15468770_3 bus1=15468770.3 kv=0.2396003617136947 phases=1 kW=0 pf=1

new load.statcom_13781202_1 bus1=13781202.1 kv=0.2396003617136947 phases=1 kW=0 pf=1
new load.statcom_13781202_2 bus1=13781202.2 kv=0.2396003617136947 phases=1 kW=0 pf=1
new load.statcom_13781202_3 bus1=13781202.3 kv=0.2396003617136947 phases=1 kW=0 pf=1

new load.statcom_13687015_1 bus1=13687015.1 kv=0.2396003617136947 phases=1 kW=0 pf=1
new load.statcom_13687015_2 bus1=13687015.2 kv=0.2396003617136947 phases=1 kW=0 pf=1
new load.statcom_13687015_3 bus1=13687015.3 kv=0.2396003617136947 phases=1 kW=0 pf=1

new load.statcom_15299670_1 bus1=15299670.1 kv=0.2396003617136947 phases=1 kW=0 pf=1
new load.statcom_15299670_2 bus1=15299670.2 kv=0.2396003617136947 phases=1 kW=0 pf=1
new load.statcom_15299670_3 bus1=15299670.3 kv=0.2396003617136947 phases=1 kW=0 pf=1

new load.statcom_15210260_1 bus1=15210260.1 kv=0.2396003617136947 phases=1 kW=0 pf=1
new load.statcom_15210260_2 bus1=15210260.2 kv=0.2396003617136947 phases=1 kW=0 pf=1
new load.statcom_15210260_3 bus1=15210260.3 kv=0.2396003617136947 phases=1 kW=0 pf=1

new load.statcom_15596111_1 bus1=15596111.1 kv=0.2396003617136947 phases=1 kW=0 pf=1
new load.statcom_15596111_2 bus1=15596111.2 kv=0.2396003617136947 phases=1 kW=0 pf=1
new load.statcom_15596111_3 bus1=15596111.3 kv=0.2396003617136947 phases=1 kW=0 pf=1

new load.statcom_17383288_1 bus1=17383288.1 kv=0.2396003617136947 phases=1 kW=0 pf=1
new load.statcom_17383288_2 bus1=17383288.2 kv=0.2396003617136947 phases=1 kW=0 pf=1
new load.statcom_17383288_3 bus1=17383288.3 kv=0.2396003617136947 phases=1 kW=0 pf=1
